A := [3; 4; 125 °]
B := [7; 5; 45 °]
r := 1
getV(poise) := [poise[0]; poise[1]]
g(poise, x) := tan(poise[2])*(x - poise[0]) + poise[1]
g_A(x) := g(A, x) → tan(125*°)*(x - 3) + 4
g_Ak := g_A(1) - g_A(0) = -1.42815
g_Ad := g_A(0) = 8.28444
g_A(x) := g_Ak*x + g_Ad
g_B(x) := g(B, x) → tan(45*°)*(x - 7) + 5
g_Bk := g_B(1) - g_B(0) = 1
g_Bd := g_B(0) = -2
g_B(x) := g_Bk*x + g_Bd
km(poise, i) := getV(poise) + r*[cos(poise[2] + 90 °*(1 - 2*i)); sin(poise[2] + 90 °*(1 - 2*i))]
a_km0 := km(A, 0) = [2.18085; 3.42642]
a_km1 := km(A, 1) = [3.81915; 4.57358]
s0_km := a_km1
b_km0 := km(B, 0) = [6.29289; 5.70711]
b_km1 := km(B, 1) = [7.70711; 4.29289]
s1_km := b_km0
k(poise, i, x) := (x - km(poise, i)[0])^2 + (y - km(poise, i)[1])^2 == r^2 solve, y → [
    sin(poise[2] - 90*°*(2*i - 1)) + poise[1] + sqrt(x - cos(90*° - 180*i*° + poise[2]) - poise[0] - 1)*sqrt(x - cos(90*° - 180*i*° + poise[2]) - poise[0] + 1)*1i;
    sin(poise[2] - 90*°*(2*i - 1)) + poise[1] - sqrt(x - cos(90*° - 180*i*° + poise[2]) - poise[0] - 1)*sqrt(x - cos(90*° - 180*i*° + poise[2]) - poise[0] + 1)*1i
]
r^2*(k^2 + 1) == (k*x_m - y_m + d)^2
beruehrbed(poise, d) := r^2*(k_t^2 + 1) == (k_t*poise[0] - poise[1] + d)^2 solve, k_t → [
    (poise[0]*poise[1] - d*poise[0] + sqrt(d^2 - 2*d*poise[1] + poise[0]^2 + poise[1]^2 - 1))/(poise[0]^2 - 1);
    -(d*poise[0] - poise[0]*poise[1] + sqrt(d^2 - 2*d*poise[1] + poise[0]^2 + poise[1]^2 - 1))/(poise[0]^2 - 1)
]
beruehrbed(s0_km, d)[0] == beruehrbed(s1_km, d)[0] solve, d → 3.92353151692 + 2.71792129361e-28i
Given
r^2*(k_t^2 + 1) == (k_t*P0[0] - P0[1] + d)^2
r^2*(k_t^2 + 1) == (k_t*P1[0] - P1[1] + d)^2
ktan_k(P0, P1) := Find(d, k_t)  # error: Das zurückgegebene symbolische Ergebnis ist zu groß zum Anzeigen, aber es kann in folgenden Berechnungen verwendet werden, wenn es einer Funktion oder Variablen zugewiesen wird.
ktan_d(poise, k_t) := r^2*(k_t^2 + 1) == (k_t*poise[0] - poise[1] + d)^2 solve, d → [sqrt(k_t^2 + 1) - k_t*poise[0] + poise[1]; poise[1] - sqrt(k_t^2 + 1) - k_t*poise[0]]
ktanSol_k := ktan_k(s0_km, s1_km) = [1.72356, 3.92353, 7.25417, -10.3522; 0.458225, 0.458225, -0.418082, 3.06418]
ktanErg_k(i) := ktanSol_k[mod(i, 2), floor(i/2)]
bestTanKD(i) := [ktanErg_k(i); ktan_d(s0_km, ktanErg_k(i))]
bestTanGlei(i, x) := bestTanKD(i)[0]*x + bestTanKD(i)[1]
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