A := [3; 4; 125 °]
B := [7; 5; 45 °]
r := 1
getV(poise) := [poise[0]; poise[1]]
g(poise, x) := tan(poise[2])*(x - poise[0]) + poise[1]
g_A(x) := g(A, x) → tan(125*°)*(x - 3) + 4
g_Ak := g_A(1) - g_A(0) = -1.42815
g_Ad := g_A(0) = 8.28444
g_A(x) := g_Ak*x + g_Ad
g_B(x) := g(B, x) → tan(45*°)*(x - 7) + 5
g_Bk := g_B(1) - g_B(0) = 1
g_Bd := g_B(0) = -2
g_B(x) := g_Bk*x + g_Bd
km(poise, i) := getV(poise) + r*[cos(poise[2] + 90 °*(1 - 2*i)); sin(poise[2] + 90 °*(1 - 2*i))]
a_km0 := km(A, 0) = [2.18085; 3.42642]
a_km1 := km(A, 1) = [3.81915; 4.57358]
s0_km := a_km1
b_km0 := km(B, 0) = [6.29289; 5.70711]
b_km1 := km(B, 1) = [7.70711; 4.29289]
s1_km := b_km0
k(poise, i, x) := (x - km(poise, i)[0])^2 + (y - km(poise, i)[1])^2 == r^2 solve, y → [
    sin(poise[2] - 90*°*(2*i - 1)) + poise[1] + sqrt(x - cos(90*° - 180*i*° + poise[2]) - poise[0] - 1)*sqrt(x - cos(90*° - 180*i*° + poise[2]) - poise[0] + 1)*1i;
    sin(poise[2] - 90*°*(2*i - 1)) + poise[1] - sqrt(x - cos(90*° - 180*i*° + poise[2]) - poise[0] - 1)*sqrt(x - cos(90*° - 180*i*° + poise[2]) - poise[0] + 1)*1i
]
TA := s0_km
TB := s1_km
TBA := TA - TB
P_m := TBA/2 + TB
Ptanp[0] := [-TBA[1]; TBA[0]]*r/|TBA| + TB
[-TBA[1]; TBA[0]]/|TBA|
Ptanp[1] := [TBA[1]; -TBA[0]]*r/|TBA| + TB
P_t := Ptanp[1]
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(x - x0_m)^2 + (y - y0_m)^2 == r0^2 solve, y → [y0_m + sqrt(r0 + x - x0_m)*sqrt(r0 - x + x0_m); y0_m - sqrt(r0 + x - x0_m)*sqrt(r0 - x + x0_m)]
(x - x1_m)^2 + (y - y1_m)^2 == r1^2 solve, y → [y1_m + sqrt(r1 + x - x1_m)*sqrt(r1 - x + x1_m); y1_m - sqrt(r1 + x - x1_m)*sqrt(r1 - x + x1_m)]
y0_m + sqrt(r0 + x - x0_m)*sqrt(r0 - x + x0_m) == y1_m + sqrt(r1 + x - x1_m)*sqrt(r1 - x + x1_m) solve, x → [
    x0_m - r0 + (r0^2*x1_m - r0^2*x0_m + 2*r0*x0_m^2 - 4*r0*x0_m*x1_m + 2*r0*x1_m^2 + 2*r0*y0_m^2 - 4*r0*y0_m*y1_m + 2*r0*y1_m^2 + r1^2*x0_m - r1^2*x1_m - x0_m^3 + 3*x0_m^2*x1_m - 3*x0_m*x1_m^2 - x0_m*y0_m^2 + 2*x0_m*y0_m*y1_m - x0_m*y1_m^2 + x1_m^3 + x1_m*y0_m^2 - 2*x1_m*y0_m*y1_m + x1_m*y1_m^2)/(2*(x0_m^2 - 2*x0_m*x1_m + x1_m^2 + y0_m^2 - 2*y0_m*y1_m + y1_m^2)) + (y0_m - y1_m)*sqrt((r0^2 + 2*r0*r1 + r1^2 - x0_m^2 + 2*x0_m*x1_m - x1_m^2 - y0_m^2 + 2*y0_m*y1_m - y1_m^2)*(2*r0*r1 - r0^2 - r1^2 + x0_m^2 - 2*x0_m*x1_m + x1_m^2 + y0_m^2 - 2*y0_m*y1_m + y1_m^2))/(2*(x0_m^2 - 2*x0_m*x1_m + x1_m^2 + y0_m^2 - 2*y0_m*y1_m + y1_m^2));
    x0_m - r0 + (r0^2*x1_m - r0^2*x0_m + 2*r0*x0_m^2 - 4*r0*x0_m*x1_m + 2*r0*x1_m^2 + 2*r0*y0_m^2 - 4*r0*y0_m*y1_m + 2*r0*y1_m^2 + r1^2*x0_m - r1^2*x1_m - x0_m^3 + 3*x0_m^2*x1_m - 3*x0_m*x1_m^2 - x0_m*y0_m^2 + 2*x0_m*y0_m*y1_m - x0_m*y1_m^2 + x1_m^3 + x1_m*y0_m^2 - 2*x1_m*y0_m*y1_m + x1_m*y1_m^2)/(2*(x0_m^2 - 2*x0_m*x1_m + x1_m^2 + y0_m^2 - 2*y0_m*y1_m + y1_m^2)) - (y0_m - y1_m)*sqrt((r0^2 + 2*r0*r1 + r1^2 - x0_m^2 + 2*x0_m*x1_m - x1_m^2 - y0_m^2 + 2*y0_m*y1_m - y1_m^2)*(2*r0*r1 - r0^2 - r1^2 + x0_m^2 - 2*x0_m*x1_m + x1_m^2 + y0_m^2 - 2*y0_m*y1_m + y1_m^2))/(2*(x0_m^2 - 2*x0_m*x1_m + x1_m^2 + y0_m^2 - 2*y0_m*y1_m + y1_m^2))
]
