# WheelSensor
wheelSteps := 12
wheelDistance := 155000
circumference := 94000
stepDistance := circumference/wheelSteps = 7833.33
Rot_L := 10
Rot_R := 15
measuredDistance_wheel := (Rot_L + Rot_R)/2*stepDistance = 97916.7
measuredAngle_wheel := (Rot_R - Rot_L)*stepDistance*1000/(2*wheelDistance*π) = 40.2166
measuredAngle_wheel.grad := measuredAngle_wheel*2*π/1000 = 14.478 deg
# MouseSensor
resolution := 400  # dpi
centerDistance := 30000
y := 2540000
x := 2540000
measuredDistance_mouse := y*1000/(resolution*2.54) = 2500000
measuredAngle_mouse := x*1000/(resolution*2.54*(2*centerDistance*π)) = 13.2629
measuredAngle_mouse.grad := measuredAngle_mouse*2*π/1000 = 4.77465 deg
Winkelrückrechnung
s := measuredDistance_wheel = 97916.7
α := measuredAngle_wheel = 40.2166
liter := 300000
r := 2*r*π == s/α*1000 solve, r → 387500
γ := atan(r/liter) = 52.2532 deg
β := 90 ° - γ = 37.7468 deg
atan(liter/r) = 37.7468 deg
